# Project Name:08-025 N.W. High School | Date:02/29/08
# Aluminum Allowable Bending & Shear Streess
# Beams-Single Web Shapes
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# Material Data:
F_tu := 38.00  # Tensile Ultimate Strength (ksi)
F_ty := 35.00  # Tensile Yield Strength (ksi)
F_cy := 35.00  # Compressive Yield Strength (ksi)
F_su := 24.00  # Shear Ultimate Strength (ksi)
E := 10100.00  # Compressive Modulus of Elasticity (ksi)
# Safety Factors:
n_u := 1.95  # Factor of Safety on Ultimate Strength
n_y := 1.65  # Factor of Safety on Yield Strength
n_a := 1.20  # Factor of Safety on Appearance of Buckling (see table 3.4-1 Aluminum Design Manual)
K_t := 1.00  # Coefficient for Tension Members (see table 3.4-2 Aluminum Design Manual)
C_b := 1.00  # Coefficient Which Depends on Moment Gradient ( Conservative=1 )
# Section Properties:
L_b := 10.00  # Unbraced Length of Beam for Bending (ft)
I_x := 21.50  # Moment of Inertia of Beam about Axis x-x (in^4)
I_y := 3.76  # Moment of Inertia of Beam about y-y (in^4)
S_c := 6.04  # Section Modulus of Beam, Compression Side (in^3)
r_x := 2.63  # Gyration ration of Cross-Section about x-x (in)
r_y := 1.09  # Gyration ration of Cross-Section about y-y (in)
h := 5.75  # Clear Hight of Shear Web (in)
b := 1.33  # Width of Section or Element (in)
t_f := 0.10  # Thickness of Element (in)
t_w := 0.10  # Thickness of Element (in)
# Allowable Tension Stress in Beams:
F_bt := min(F_ty/n_y, F_tu/(K_t*n_u))
F_bt = 19.4872  # ksi
# Allowable Compression Stress in Beams:
B_c := F_cy*(1 + (F_cy/2250)^(1/2))
B_c = 39.3653  # ksi
D_c := B_c/10*(B_c/E)^(1/2)
D_c = 0.245759
C_c := 0.41*B_c/D_c
C_c = 65.6732
S_1 := 1.2*(B_c - F_cy)/D_c
S_1 = 21.3149
S_2 := 1.2*C_c
S_2 = 78.8078
S_element.bend := L_b*12/(r_y*sqrt(C_b))
S_element.bend = 110.092
F_bc :=
    F_cy/n_y if S_element.bend ≤ S_1
    1/n_y*(B_c - D_c*L_b*12/(1.2*r_y*sqrt(C_b))) if S_1 < S_element.bend ≤ S_2
    3.1416^2*E*C_b/(n_y*(L_b*12/(1.2*r_y))^2) if S_element.bend > S_2
F_bc = 7.17781  # ksi
# Allowable Compression Stress in Beams Elements (Flanges):
# Flat Element Supported on One Edge:
k_1f := 0.35  # Coefficient for Slenderness Limits
k_2f := 2.27  # Coefficient for Slenderness Limits
B_p := F_cy*(1 + F_cy^(1/3)/11.4)
B_p = 45.0427  # ksi
D_p := B_p/10*(B_p/E)^(1/2)
D_p = 0.300799
C_p := 0.41*B_p/D_p
C_p = 61.3949
S_1.F := (B_p - F_cy)/(5.1*D_p)
S_1.F = 6.54645
S_2.F := k_1f*B_p/(5.1*D_p)
S_2.F = 10.2765
S_element.flange := b/t_f
S_element.flange = 13.3
F_e.F :=
    F_cy/n_y if S_element.flange ≤ S_1.F
    1/n_y*(B_p - 5.1*D_p*S_element.flange) if S_1.F < S_element.flange ≤ S_2.F
    k_2f*sqrt(B_p*E)/(n_y*(5.1*S_element.flange)) if S_element.flange > S_2.F
F_e.F = 13.6802  # ksi
# Allowable Compression Stress in Beams Elements (Web):
# Flat Element Supported on Both Edges:
k_1w := 0.50  # Coefficient for Slenderness Limits
k_2w := 2.04  # Coefficient for Slenderness Limits
m := 0.65  # For neutral axis located h/2
B_br := 1.3*F_cy*(1 + F_cy^(1/3)/7)
B_br = 66.7619  # ksi
D_br := B_br/20*(6*B_br/E)^(1/2)
D_br = 0.664781
C_br := 2*B_br/(3*D_br)
C_br = 66.9514
S_1.W := (B_br - 1.3*F_cy)/(m*D_br)
S_1.W = 49.2052
S_2.W := k_1w*B_br/(m*D_br)
S_2.W = 77.2516
S_element.web := h/t_w
S_element.web = 57.5
F_e.W :=
    1.3*F_cy/n_y if S_element.web ≤ S_1.W
    1/n_y*(B_br - m*D_br*S_element.web) if S_1.W < S_element.web ≤ S_2.W
    k_2w*sqrt(B_br*E)/(n_y*(m*S_element.web)) if S_element.web > S_2.W
F_e.W = 25.4035  # ksi
# Allowable Compression Stress in Beams Elements (Stiffener)
# (Element in Uniform Compression Gross Section) :
# Flat Element Supported on One Edge:
b_S.1 := 0.50  # Width of Stiffener Element (in)
t_S.1 := 0.0625  # Thickness of Stiffener Element (in)
k_1S.1 := 0.35  # Coefficient for Slenderness Limits
k_2S.1 := 2.27  # Coefficient for Slenderness Limits
B_p.S.1 := F_cy*(1 + F_cy^(1/3)/11.4)
B_p.S.1 = 45.0427  # ksi
D_p.S.1 := B_p.S.1/10*(B_p.S.1/E)^(1/2)
D_p.S.1 = 0.300799
C_p.S.1 := 0.41*B_p.S.1/D_p.S.1
C_p.S.1 = 61.3949
S_1.S.1 := (B_p.S.1 - F_cy)/(5.1*D_p.S.1)
S_1.S.1 = 6.54645
S_2.S.1 := k_1S.1*B_p.S.1/(5.1*D_p.S.1)
S_2.S.1 = 10.2765
S_element.stiffener.1 := b_S.1/t_S.1
S_element.stiffener.1 = 8
F_e.S.1 :=
    F_cy/n_y if S_element.stiffener.1 ≤ S_1.S.1
    1/n_y*(B_p.S.1 - 5.1*D_p.S.1*S_element.stiffener.1) if S_1.S.1 < S_element.stiffener.1 ≤ S_2.S.1
    k_2S.1*sqrt(B_p.S.1*E)/(n_y*(5.1*S_element.stiffener.1)) if S_element.stiffener.1 > S_2.S.1
F_e.S.1 = 19.8607  # ksi
# Allowable Compression Stress in Beams Elements (Stiffener)
# (Element in Uniform Compression Gross Section) :
# Flat Element Supported on Both Edge:
b_S.2 := 0.628  # Width of Stiffener Element (in)
t_S.2 := 0.0625  # Thickness of Stiffener Element (in)
k_1S.2 := 0.35  # Coefficient for Slenderness Limits
k_2S.2 := 2.27  # Coefficient for Slenderness Limits
B_p.S.2 := F_cy*(1 + F_cy^(1/3)/11.4)
B_p.S.2 = 45.0427  # ksi
D_p.S.2 := B_p.S.2/10*(B_p.S.2/E)^(1/2)
D_p.S.2 = 0.300799
C_p.S.2 := 0.41*B_p.S.2/D_p.S.2
C_p.S.2 = 61.3949
S_1.S.2 := (B_p.S.2 - F_cy)/(1.6*D_p.S.2)
S_1.S.2 = 20.8668
S_2.S.2 := k_1S.2*B_p.S.2/(1.6*D_p.S.2)
S_2.S.2 = 32.7564
S_element.stiffener.2 := b_S.2/t_S.2
S_element.stiffener.2 = 10.048
F_e.S.2 :=
    F_cy/n_y if S_element.stiffener.2 ≤ S_1.S.2
    1/n_y*(B_p.S.2 - 1.6*D_p.S.2*S_element.stiffener.2) if S_1.S.2 < S_element.stiffener.2 ≤ S_2.S.2
    k_2S.2*sqrt(B_p.S.2*E)/(n_y*(1.6*S_element.stiffener.2)) if S_element.stiffener.2 > S_2.S.2
F_e.S.2 = 21.2121  # ksi
# Allowable Stress in Shear:
B_s := F_ty/sqrt(3)*(1 + (F_ty/sqrt(3))^(1/3)/9.3)
B_s = 26.1255
D_s := B_s/10*(B_s/E)^(1/2)
D_s = 0.132873
C_s := 0.41*B_s/D_s
C_s = 80.6143
S_1.shear := (B_s - F_ty/sqrt(3))/(1.25*D_s)
S_1.shear = 35.6326
S_2.shear := C_s/1.25
S_2.shear = 64.4914
S_element.shear := h/t_w
S_element.shear = 57.5
F_v :=
    F_ty/(sqrt(3)*n_y) if S_element.shear < S_1.shear
    1/n_y*(B_s - 1.25*D_s*(h/t_w)) if S_1.shear < S_element.shear ≤ S_2.shear
    3.1416^2*E/(n_y*(1.25*h/t_w)^2) if S_element.shear > S_2.shear
F_v = 10.0456
